Simulations: Version=216
  Report AnalysisReport
    VariableNames:
      [Clock].Today
       [Simulation].Name
       [Soil].Water.Volumetric
       [Wheat].AboveGround.N
       [Wheat].AboveGround.Wt
       [Wheat].AboveGroundDead.N
       [Wheat].AboveGroundDead.Wt
       [Wheat].AboveGroundLive.N
       [Wheat].AboveGroundLive.Wt
       [Wheat].Ear.N
       [Wheat].Ear.NConc
       [Wheat].Ear.Wt
       [Wheat].Grain.N
       [Wheat].Grain.NConc
       [Wheat].Grain.NperKernel
       [Wheat].Grain.Number
       [Wheat].Grain.Size
       [Wheat].Grain.Wt
       [Wheat].Leaf.CoverGreen
       [Wheat].Leaf.CoverTotal
       [Wheat].Leaf.Dead.N
       [Wheat].Leaf.Dead.NConc
       [Wheat].Leaf.Dead.Wt
       [Wheat].Leaf.FinalLeafNumber
       [Wheat].Leaf.Fn
       [Wheat].Leaf.Fw
       [Wheat].Leaf.Height
       [Wheat].Leaf.LAI
       [Wheat].Leaf.Ligules
       [Wheat].Leaf.Live.N
       [Wheat].Leaf.Live.NConc
       [Wheat].Leaf.Live.Wt
       [Wheat].Leaf.MainStemPopulation
       [Wheat].Leaf.Photosynthesis.FT
       [Wheat].Leaf.SpecificArea
       [Wheat].Leaf.SpecificAreaCanopy
       [Wheat].Leaf.SpecificNitrogen
       [Wheat].Leaf.StemNumberPerPlant
       [Wheat].Leaf.StemPopulation
       [Wheat].Leaf.Tips
       [Wheat].Leaf.Transpiration
       [Wheat].Phenology.AccumulatedTT
       [Wheat].Phenology.CurrentPhase.Name
       [Wheat].Phenology.CurrentStageName
       [Wheat].Phenology.EmergenceDAS
       [Wheat].Phenology.HaunStage
       [Wheat].Phenology.Photoperiod
       [Wheat].Phenology.Phyllochron
       [Wheat].Phenology.PTQ
       [Wheat].Phenology.Stage
       [Wheat].Phenology.ThermalTime
       [Wheat].Phenology.Zadok.Stage
       [Wheat].Root.Depth
       [Wheat].Root.N
       [Wheat].Root.NConc
       [Wheat].Root.Wt
       [Wheat].SowingData.Cultivar
       [Wheat].Spike.N
       [Wheat].Spike.NConc
       [Wheat].Spike.Wt
       [Wheat].Stem.N
       [Wheat].Stem.Live.N
       [Wheat].Stem.NConc
       [Wheat].Stem.Live.NConc
       [Wheat].Stem.Wt
       [Wheat].StemPlusSpike.N
       [Wheat].StemPlusSpike.Wt
       [Wheat].Total.N
       [Wheat].Total.Wt
       sum([Soil].NO3.kgha)
       sum([Soil].Water.MM)
       [Spectral].NDVI
       1.0 * [Wheat].Grain.Wt / ([Wheat].AboveGround.Wt + 0.00001) as HarvestIndex
      1.0 * [Wheat].Leaf.Live.StorageWt / ([Wheat].Leaf.Live.Wt + 0.00001) as Wheat.Leaf.Live.WSCc
      1.0 * [Wheat].Stem.Live.StorageWt / ([Wheat].Stem.Live.Wt + 0.00001) as Wheat.Stem.Live.WSCc
      1.0 * [Wheat].Spike.Live.StorageWt / ([Wheat].Spike.Live.Wt + 0.00001) as Wheat.Spike.Live.WSCc
      1.0 * [Wheat].Leaf.Dead.StorageWt/([Wheat].Leaf.Dead.Wt + 0.00001) as Wheat.Leaf.Dead.WSCc
    EventNames:
      [Clock].DoReport
      [Wheat].Harvesting
